OpenVSP model (file version 5), 5 components.
Geometry view with OpenVSP parameter names; values to 6 digits, angles in degrees, lengths in the model's unit.
Overall bounding box: X_Min=0 X_Len=27.7993 Y_Min=-18.4964 Y_Len=36.9928 Z_Min=-2.22452 Z_Len=8.17517

Fuselage "FuselageGeom"
  location (X Y Z) 0 0 0, rotation 0 0 0
  bounding box size 27.6513 4.0824 5.70039
  Design: Length=25.2
  cross sections:
    n  XLocPercent  YLocPercent  ZLocPercent  shape
    0  0            0            0.033        point
    1  0.055        0            0.025        super ellipse Super_Height=1 Super_M=2 Super_MaxWidthLoc=0.29 Super_N=2 Super_Width=2.35
    2  0.21         0            0            super ellipse Super_Height=3.65 Super_M=2 Super_MaxWidthLoc=0.29 Super_N=2 Super_Width=3.6
    3  0.3          0            0.025        general fuselage BotStr=1.5 BotTanAngle=90 CornerRad=0 Height=5.2 LowStr=1 MaxWidthLoc=0 TopStr=2 TopTanAngle=90 UpStr=1.5 Width=3.8
    4  0.512        0            0.011        general fuselage BotStr=1.5 BotTanAngle=90 CornerRad=0 Height=3.85 LowStr=1.5 MaxWidthLoc=0 TopStr=1.5 TopTanAngle=90 UpStr=1.5 Width=3.75
    5  0.56         0            0.00025      super ellipse Super_Height=3 Super_M=3 Super_MaxWidthLoc=0 Super_N=3 Super_Width=3.45
    6  0.9          0            0.0022       super ellipse Super_Height=1.6 Super_M=3 Super_MaxWidthLoc=0 Super_N=3 Super_Width=1.3
    7  1            0            0.0072       super ellipse Super_Height=0.95 Super_M=2 Super_MaxWidthLoc=0 Super_N=2 Super_Width=0

Wing "WingGeom", child of "FuselageGeom"
  location (X Y Z) 6.55 0 2.9, rotation 0 0 0
  symmetric about XZ
  bounding box size 5.98593 37.4499 1.22842
  totals: TotalSpan=36.1004 TotalProjectedSpan=36.0764 TotalChord=5.485 TotalArea=197.609 TotalAR=6.58629
  root: chord 5.98, twist 0, NACA 4-series Camber=0.02 CamberLoc=0.4 ThickChord=0.12
  sections:
    n  Span    Root_Chord  Tip_Chord  Area     Sweep  Sweep_Location  Dihedral  Twist  Twist_Location  tip airfoil
    1  8.8222  5.98        5.98       52.7568  0.035  0               1.7       0      0.25            as above
    2  9.228   5.98        4          46.0477  5.2    0               2.4       0      0.25            as above

Propeller "PropGeom", child of "WingGeom"
  location (X Y Z) 1 0 0.7, rotation 0 0 0
  bounding box size 0.5759 5.25589 5.31797
  Design: Diameter=6.5 NumBlade=2 Beta34=20 UseBeta34Flag=1 Feather=-35 Rotate=45 Precone=0 ReverseFlag=0 FoldAngle=0 PropMode=0 AF=213.704 CLi=0.539797 Chord=0.23275 Solidity=0.148173 ConstructXoC=0.5 FeatherAxisXoC=0.5 FeatherOffsetXoC=0
  cross sections:
    n  RadiusFrac  shape
    0  0.15        ellipse Ellipse_Height=0.2275 Ellipse_Width=0.2275
    1  0.4         NACA 16-series Chord=0.700065 IdealCl=0.7 ThickChord=0.644074
    2  1           NACA 16-series Chord=0.91 IdealCl=0.2 ThickChord=0.53
  Chord along r/R (cubic Bezier): 0.15: 0.07, 0.3: 0.17, 0.45: 0.26, 0.6: 0.27, 0.716667: 0.281, 0.833333: 0.28, 0.95: 0.28, 0.966667: 0.28, 0.983333: 0.28, 1: 0.28
  Twist along r/R (PCHIP): 0.15: 70, 0.75: 55, 1: 45
  Thick along r/R (cubic Bezier): 0.15: 1, 0.2: 0.8, 0.25: 0.725, 0.3: 0.7, 0.4: 0.625, 0.5: 0.615, 0.6: 0.6, 0.733333: 0.575, 0.866667: 0.555, 1: 0.53
  CLI along r/R (cubic Bezier): 0.15: 0, 0.233333: 0.7, 0.316667: 0.7, 0.4: 0.7, 0.466667: 0.7, 0.533333: 0.7, 0.6: 0.7, 0.733333: 0.7, 0.866667: 0.7, 1: 0.2

Wing "Horizontal_Tail", child of "FuselageGeom"
  location (X Y Z) 21.8 0 0.57, rotation 0 0 0
  symmetric about XZ
  bounding box size 4.90611 11.3457 0.596896
  totals: TotalSpan=11.1 TotalProjectedSpan=11.1 TotalChord=3.9 TotalArea=43.29 TotalAR=2.84615
  root: chord 4.90566, twist 0, NACA 4-series Camber=0.02 CamberLoc=0.4 ThickChord=0.12
  sections:
    n  Span  Root_Chord  Tip_Chord  Area    Sweep  Sweep_Location  Dihedral  Twist  Twist_Location  tip airfoil
    1  5.55  4.90566     2.89434    21.645  9.95   0               0         0      0.25            edit curve Width=2.89434 Height=0.1 AbsoluteFlag=0 SymType=1 cubic Bezier points (X Y): 0.5 0, 0.5 -0.276142, 0.276142 -0.5, 0 -0.5, -0.276142 -0.5, -0.5 -0.276142, -0.5 0, -0.5 0.276142, -0.276142 0.5, 0 0.5, 0.276142 0.5, 0.5 0.276142, 0.5 0

Wing "Vertical_Tail", child of "FuselageGeom"
  location (X Y Z) 16.5 0 1.3, rotation 90 0 -4.75
  symmetric about XZ
  bounding box size 11.2426 1.35471 4.77246
  totals: TotalSpan=9.6 TotalProjectedSpan=9.6 TotalChord=4.29 TotalArea=33.66 TotalAR=2.73797
  root: chord 8.55, twist 0, NACA 4-series Camber=0.02 CamberLoc=0.4 ThickChord=0.12
  sections:
    n  Span  Root_Chord  Tip_Chord  Area  Sweep  Sweep_Location  Dihedral  Twist  Twist_Location  tip airfoil
    1  1.3   8.55        3.45       7.8   28.5   0.99            0         0      0.25            as above
    2  3.5   3.45        1.71       9.03  25.83  0.99            0         0      0.25            as above
